###############################################################################
# MD simulation for NN water
###############################################################################

###############################################################################
# VARIABLES
###############################################################################
clear
# Configuration files
variable cfgFile         string "lmp/restart.data"
# Timesteps
variable numSteps        equal  50000
variable dt              equal  0.5
# NN
variable nnpCutoff       equal  6.36
variable nnpDir          string "nnp"
# Masses
variable mass_H          equal  1.00794
variable mass_O          equal  15.9994

###############################################################################
# GENERAL SETUP
###############################################################################
units real   # NOT METAL!!!
boundary p p p
atom_style full
#read_data ${cfgFile}
read_restart ${cfgFile}
mass 1 ${mass_H}
mass 2 ${mass_O}
timestep ${dt}
thermo 10

###############################################################################
# NN
###############################################################################
pair_style nnp dir ${nnpDir} showew no showewsum 0 resetew yes maxew 1000 cflength 1.8897261328 cfenergy 0.0015936 # kcal/mol -> Hartree !!!
pair_coeff * * ${nnpCutoff}

###############################################################################
# SETTING
###############################################################################
dump            1 all xyz 1000 lmp/dump.xyz
dump_modify     1 sort id element H O

variable  dens equal (mass(all)/vol*1.66054) # gr/cm3
thermo_style   custom step temp etotal pe press lx ly ly v_dens

###############################################################################
# SIMULATION
###############################################################################

variable T      equal 300
variable P      equal 1.0

variable        s file lmp/rnd.txt
velocity   	    all create $T $s dist gaussian mom yes rot yes
print           "Seed for initial velocities is $s"
next            s

# ---

compute         e0 all pe/atom
dump            dataset all custom 50 lmp/nnp.data id x y z type q c_e0 fx fy fz
dump_modify     dataset sort id append yes
reset_timestep  0

# ---

fix        		 rlx all npt temp $T $T 100 iso $P $P 1000
run 			     ${numSteps}

# ---

#write_data      lmp/restart.nnp.data
